<?xml version="1.0"?>

<!-- BeamFEMForceField example -->
<Node name="root" dt="0.01">
    <RequiredPlugin name="Sofa.Component.Collision.Detection.Algorithm"/> <!-- Needed to use components [BVHNarrowPhase BruteForceBroadPhase CollisionPipeline] -->
    <RequiredPlugin name="Sofa.Component.Collision.Detection.Intersection"/> <!-- Needed to use components [MinProximityIntersection] -->
    <RequiredPlugin name="Sofa.Component.Collision.Geometry"/> <!-- Needed to use components [LineCollisionModel PointCollisionModel SphereCollisionModel TriangleCollisionModel] -->
    <RequiredPlugin name="Sofa.Component.Collision.Response.Contact"/> <!-- Needed to use components [CollisionResponse] -->
    <RequiredPlugin name="Sofa.Component.Constraint.Projective"/> <!-- Needed to use components [FixedProjectiveConstraint] -->
    <RequiredPlugin name="Sofa.Component.IO.Mesh"/> <!-- Needed to use components [MeshOBJLoader] -->
    <RequiredPlugin name="Sofa.Component.LinearSolver.Direct"/> <!-- Needed to use components [BTDLinearSolver] -->
    <RequiredPlugin name="Sofa.Component.LinearSolver.Iterative"/> <!-- Needed to use components [CGLinearSolver] -->
    <RequiredPlugin name="Sofa.Component.Mapping.Linear"/> <!-- Needed to use components [BeamLinearMapping IdentityMapping] -->
    <RequiredPlugin name="Sofa.Component.Mass"/> <!-- Needed to use components [UniformMass] -->
    <RequiredPlugin name="Sofa.Component.ODESolver.Backward"/> <!-- Needed to use components [EulerImplicitSolver] -->
    <RequiredPlugin name="Sofa.Component.SolidMechanics.FEM.Elastic"/> <!-- Needed to use components [BeamFEMForceField] -->
    <RequiredPlugin name="Sofa.Component.StateContainer"/> <!-- Needed to use components [MechanicalObject] -->
    <RequiredPlugin name="Sofa.Component.Topology.Container.Constant"/> <!-- Needed to use components [CubeTopology MeshTopology] -->
    <RequiredPlugin name="Sofa.Component.Visual"/> <!-- Needed to use components [VisualStyle] -->

    <DefaultAnimationLoop/>
    <VisualStyle displayFlags="showBehaviorModels hideForceFields showCollisionModels hideVisual showInteractionForceFields" />

    <Node name="beam-withTriangulatedCubeCollision">
        <MechanicalObject template="Rigid3" name="DOFs" position="0 0 0 0 0 -0.707 0.707  0 1 0 0 0 -0.707 0.707  0 2 0 0 0 -0.707 0.707  0 3 0 0 0 -0.707 0.707  0 4 0 0 0 -0.707 0.707" />
<!--        <MechanicalObject template="Rigid3" name="DOFs" position="0 0 0 0 0 0 1  0 1 0 0 0 0 1  0 2 0 0 0 0 1  0 3 0 0 0 0 1  0 4 0 0 0 0 1" />-->
<!--        <MechanicalObject template="Rigid3" name="DOFs" position="0 0 0 0 0 0 1  0 1 0 0 0 0 1  0 2 0 0 0 0 1  0 3 0 0 0 0 1  0 4 0 0 0 0 1  0 5 0 0 0 0 1  0 6 0 0 0 0 1  0 7 0 0 0 0 1  0 8 0 0 0 0 1  0 9 0 0 0 0 1  0 10 0 0 0 0 1  0 11 0 0 0 0 1  0 12 0 0 0 0 1  0 13 0 0 0 0 1  0 14 0 0 0 0 1" />        -->
        <MeshTopology name="lines" lines="0 1 1 2 2 3 3 4 " />
        <UniformMass vertexMass="1 1 0.01 0 0 0 0.1 0 0 0 0.1" printLog="false" />
        <BeamFEMForceField name="FEM" radius="0.1" radiusInner="0" youngModulus="20000000" poissonRatio="0.49"/>
        <ReadState name="read" filename="beam.state" interval="1" />

    </Node>
</Node>
